// SBML level 3 version 2

model toy_model_v1()

  // Compartments:
  compartment default = 1;

  // Species:
  substanceOnly species A_unphos_empty in default = 1; A_unphos_empty is "A [unphos [], empty []]";
  substanceOnly species A_phos_empty in default = 1; A_phos_empty is "A [phos [], empty []]";
  substanceOnly species B_empty in default = 1; B_empty is "B [empty []]";
  substanceOnly species K in default = 1; K is "K []";
  substanceOnly species species_4 in default = 1; species_4 is "let bond [] in (A [unphos [], 0.0], A [unphos [], 0.1])";
  substanceOnly species species_5 in default = 1; species_5 is "let bond [] in (A [phos [], 0.1], A [unphos [], 0.0])";
  substanceOnly species species_6 in default = 1; species_6 is "let bond [] in (A [phos [], 0.0], A [unphos [], 0.1])";
  substanceOnly species species_7 in default = 1; species_7 is "let bond [] in (A [phos [], 0.0], A [phos [], 0.1])";
  substanceOnly species let_bond_in_A_unphos_0_0_B_0_1 in default = 1; let_bond_in_A_unphos_0_0_B_0_1 is "let bond [] in (A [unphos [], 0.0], B [0.1])";
  substanceOnly species let_bond_in_A_phos_0_0_B_0_1 in default = 1; let_bond_in_A_phos_0_0_B_0_1 is "let bond [] in (A [phos [], 0.0], B [0.1])";
  substanceOnly species let_bond_in_B_0_0_B_0_1 in default = 1; let_bond_in_B_0_0_B_0_1 is "let bond [] in (B [0.0], B [0.1])";
  substanceOnly species let_bond_in_A_unphos_0_1_B_0_0 in default = 1; let_bond_in_A_unphos_0_1_B_0_0 is "let bond [] in (A [unphos [], 0.1], B [0.0])";
  substanceOnly species let_bond_in_A_phos_0_1_B_0_0 in default = 1; let_bond_in_A_phos_0_1_B_0_0 is "let bond [] in (A [phos [], 0.1], B [0.0])";

  // Parameters:
  k0 = 1;
  k1 = 1;
  k2 = 1;
  k3 = 1;
  k4 = 1;
  k5 = 1;
  k6 = 1;

  // Reactions:
  bondAB_unphos: A_unphos_empty + B_empty => let_bond_in_A_unphos_0_0_B_0_1; k0*A_unphos_empty*B_empty; bondAB_unphos is "bondAB [unphos []]";
  bondAB_phos: A_phos_empty + B_empty => let_bond_in_A_phos_0_0_B_0_1; k1*A_phos_empty*B_empty; bondAB_phos is "bondAB [phos []]";
  phosphorylate_empty: A_unphos_empty + K => A_phos_empty + K; k2*A_unphos_empty*K; phosphorylate_empty is "phosphorylate [empty []]";
  reaction_3: species_4 + K => species_5 + K; k3*species_4*K; reaction_3 is "let bond [] in (A [unphos [], 0.0], phosphorylate [0.1])";
  reaction_4: species_6 + K => species_7 + K; k4*species_6*K; reaction_4 is "let bond [] in (A [phos [], 0.0], phosphorylate [0.1])";
  reaction_5: let_bond_in_A_unphos_0_1_B_0_0 + K => let_bond_in_A_phos_0_1_B_0_0 + K; k5*let_bond_in_A_unphos_0_1_B_0_0*K; reaction_5 is "let bond [] in (B [0.0], phosphorylate [0.1])";
  reaction_6: species_4 + K + K => species_7 + K + K; k6*species_4*K*K; reaction_6 is "let bond [] in (phosphorylate [0.0], phosphorylate [0.1])";
end
